# Сметки за снъбер
# di/dt protection
# Минималната измерена паразитна индуктивност беше 50uH
# Vs го приемам за 600V като максимална пикова стойност на напрежение
V_S := 600 V
L_S := [50; 547; 1430]*μH
didt_calculated := V_S/L_S = [12; 1.09689; 0.41958] A/μs
didt_datasheet := 50*A/μs
# dv/dt protection
# Коя схема да избера?
I_TD := 4 A
# I(TD) - discharge current - как да го избера?
# dI/dt max = 50A/uS
R_S := V_S/I_TD = 150 Ω
I_TSM := 160 A  # I2T (for fusing) = 144 A2s
dvdt := 0.632*V_S/(R_S*C_S)  # error: This variable is undefined.
