P_H := 400 W
P_ZONE := P_H*8 = 3.2 kW
BGN := 1*¤
kWh := kW*hr
I_ZONE := P_ZONE/(230 V) = 13.913 A
MWh := 1000*kWh
# Estimated power to maintain a heater @ 300C = 120W | Средна цена на електроенергията с ДДС
I_H := 120 W/(230 V) = 0.521739 A
I_Z := I_H*8 = 4.17391 A
E_price := 340.705*BGN/MWh = 0.340705 BGN/kWh
# Thyristor - BTA24-600BW - 600V 25A | Transistor - IPA60R180P7SXKSA1
# V(tm) @ 12A, 25C = 1.4V; @ 4.2A, 25C = 1.08A
R_DSon := [0.14; 0.14; 0.165]*Ω
Price_trans := 1.63*1.95*2*BGN = 6.357 BGN
V_TM := [1; 1.08; 1.4]*V
Price_thyr := 1.39*BGN  # @ 1 pcs, 7 zones needed, Comet
Losses_tran := I_Z^2*R_DSon = [2.43902; 2.43902; 2.87456] W
Losses_thyr := I_Z*V_TM = [4.17391; 4.50783; 5.84348] W
Price_trans - Price_thyr = 4.967 BGN
# Време за оправдаване на инвестицията в Мосфет
Losses_diff := Losses_thyr - Losses_tran = [1.7349; 2.06881; 2.96892] W
Days := (Price_trans - Price_thyr)/(E_price*(Losses_thyr - Losses_tran)*24*hr) = [350.131; 293.619; 204.6]
E_price*Losses_diff*24*hr = [0.0141861; 0.0169165; 0.0242766] BGN
